// COMSOL Multiphysics 5.6.0.341 model "GraviCon_GS.mph"
// GraviCon GS
// Outline of the model tree

Parameters
  H = 0.007[m]  // Heigth of dessalination channel
  L = 0.02[m]  // Length of dessalination channel
  gamma = 0  // Tilt angle
  V0 = 1e-4[m/s]  // Input velocity
  C0 = 100[mol/m^3]  // Input/initial concentration
  T0 = 293.15[K]  // Input/initial temperature
  iav = 70[A/m^2]  // AVERAGE ELECTRIC DENSITY
  rho = 1002.5[kg/m^3]  // Density
  nu = 1.006e-6[m^2/s]  // Kinematic viscosity
  D1 = 1.33e-9[m^2/s]  // Diffusion coefficient of cations
  D2 = 2.05e-9[m^2/s]  // Diffusion coefficient of anions
  alfa = 142.5e-9[m^2/s]  // Thermal diffusivity coefficient
  F = 96485.33838[A*s/mol]  // Faraday constant
  R = 8.31446[J/(mol*K)]  // Gas constant
  cp = 4083[J/(kg*K)]  // Specific heat
  Ac = 0.04127[kg/mol]  // Ac coefficient
  At = -0.23[kg/(m^3*K)]  // At coefficient
  g = 9.8156[m/s^2]  // Acceleration of gravity
  n1 = 1  // Number of cations after dissociation of 1 molecula of electrolyte
  n2 = 1  // Number of anions after dissociation of 1 molecula of electrolyte
  z1 = 1  // Charge number of cations
  z2 = -1  // Charge number of anions
  D = D1*D2*(z1-z2)/(z1*D1-z2*D2)  // Diffusion coefficient of electrolyte
  tk = (z1^2*n1*D1)/(z1^2*n1*D1+z2^2*n2*D2)  // Transport number of cations
  ta = (z2^2*n2*D2)/(z1^2*n1*D1+z2^2*n2*D2)  // Transport number of anions
  Tk = 1-tk  // Coefficient in boundary condition for C on CEM
  Ta = 1-ta  // Coefficient in boundary condition for C on AEM
  kp = 0.6[W/(m^2*K)]  // Heat transfer coefficient
  kt = alfa*rho*cp  // Thermal conductivity coefficient
  K = kp/kt  // Heat exchange coefficient
  Ke1 = n1*z1*D1+n2*z2*D2  // Coefficient in equations on E and I.
  Ke2 = n1*z1^2*D1+n2*z2^2*D2  // Coefficient in equations on E and I.

Variables
  var1 "Variables 1" on domains 1
    ix = etay
    iy = -etax
    Ex = R*T0*(ix/F+Ke1*Cx)/(Ke2*C*F)
    Ey = R*T0*(iy/F+Ke1*Cy)/(Ke2*C*F)
    Fx = -g*sin(gamma)*(Ac*(C-C0)+At*(T-T0))
    Fy = -g*cos(gamma)*(Ac*(C-C0)+At*(T-T0))
    Fgx = -g*sin(gamma)*Ac*(C-C0)
    Fgy = -g*cos(gamma)*Ac*(C-C0)
    Ftx = -g*sin(gamma)*At*(T-T0)
    Fty = -g*cos(gamma)*At*(T-T0)

Geometry
  geom1 "Geometry 1" (2D, length unit m)
    r1: Rectangle | size = {H, L}
    fin: Finalize "Form Union"

Physics
  spf: LaminarFlow on all domains
    dependent variable u = {u, v, w}
    fp1: FluidProperties (default) | rho_mat = userdef; rho = rho; mu_mat = userdef; mu = nu*rho
    wall1: Wall (default)
    init1: init "Initial Values 1" (default) | u = {0, V0, 0}
    vf1: VolumeForce on domains 1 | F = {Fx, Fy, 0}
    inl1: Inlet on boundaries 2 | ComponentWise = NormalInflowVelocity; U0in = V0; u0 = {0, V0, 0}
    out1: Outlet on boundaries 3
      BoundaryCondition = Velocity
      ComponentWise = NormalOutflowVelocity
      U0out = V0
      u0 = {0, V0, 0}
    prpc1: PressurePointConstraint on points 2, 4 | p0 = 1e5
  chds: DilutedSpecies "Transport of Diluted Species" on all domains
    dependent variable C
    cdm1: ConvectionDiffusionMigration "Convection and Diffusion 1" (default) | u = {u, v, 0}; D_0 = D
    nflx1: NoFlux (default)
    init1: init "Initial Values 1" (default)
    fl1: Fluxes "Flux 1" on boundaries 1 | species = 1; N0 = -ix*Ta/F
    in1: Inflow on boundaries 2 | c0 = C0
    out1: Outflow on boundaries 3
    fl2: Fluxes "Flux 2" on boundaries 4 | species = 1; N0 = -ix*Tk/F
  g: GeneralFormPDE on all domains
    dependent variable T
    Units.DependentVariableQuantity = temperature
    Units.SourceTermQuantity = none
    Units.CustomSourceTermUnit = K/s
    gfeq1: GeneralFormPDE (default) | f = -u*Tx-v*Ty+(ix*Ex+iy*Ey)/(rho*cp); Ga = {-alfa*Tx, -alfa*Ty}; da = 1
    zflx1: ZeroFluxBoundary "Zero Flux 1" (default)
    init1: init "Initial Values 1" (default) | T = T0
    dir1: DirichletBoundary "Dirichlet Boundary Condition 1" on boundaries 2 | r = T0
    flux1: FluxBoundary "Flux/Source 1" on boundaries 1, 4 | g = -alfa*K*(T-T0)
  g2: GeneralFormPDE on all domains
    dependent variable eta
    Units.DependentVariableQuantity = none
    Units.CustomDependentVariableUnit = A/m
    Units.CustomSourceTermUnit = A/m^3
    gfeq1: GeneralFormPDE (default) | f = (Cx*etax+Cy*etay)/C; Ga = {etax, etay}; da = 0
    zflx1: ZeroFluxBoundary "Zero Flux 1" (default)
    init1: init "Initial Values 1" (default) | eta = iav*y
    dir1: DirichletBoundary "Dirichlet Boundary Condition 1" on boundaries 2 | r = 0
    dir2: DirichletBoundary "Dirichlet Boundary Condition 2" on boundaries 3 | r = iav*L

Mesh
  mesh1 "Mesh 1" (physics-controlled)
    size: MeshSizeDefault | table = cfd; hauto = 3

Studies
  std1 "Study 1"
    time: Transient "Time Dependent" | tlist = range(0,10,60)

Solver configurations
  sol1 "Solution 1" (study std1)
    v1: Variables "Dependent Variables 1"
    t1: Time "Time-Dependent Solver 1" | tlist = range(0,10,60); atolglobal = 5.0E-4; maxorder = 2; estrat = exclude
      d1: Direct
      se1: Segregated
        ss1: SegregatedStep "Остальное" | segvar = {mod1_eta, mod1_T, mod1_C}
        ssDef: SegregatedStep "Гидродинамика" | segvar = {mod1_u, mod1_p}

Datasets
  dset1: Solution | solution = sol1

Evaluation groups
  eg1: EvaluationGroup | data = dset1
    int1: IntLine "Изменение пототока соли" on boundaries 3 | expr = {(V0*C0-v*C)*1[m], }

Plots
  pg1: PlotGroup2D "2D Plot Group 1" | data = dset1
    surf1: Surface | expr = C
    con1: Contour | expr = NS.U
  pg2: PlotGroup1D "1D Plot Group 2" | data = dset1
    tblp1: Table "Table Graph 1" | source = evaluationgroup